<?xml version="1.0"?>
<Node 	 name="root"  gravity="0 0 0"  dt="0.333333"  >
	<DefaultPipeline name="Collision Pipeline" />
	<BruteForceDetection name="Detection" />
	<LocalMinDistance name="Proximity"  alarmDistance="0.0001"  contactDistance="1e-06" />
	<DefaultContactManager name="Contact Manager"  response="default" />
	<DefaultCollisionGroupManager name="Collision Group Manager" />
	<EulerImplicitSolver name="root_TimeIntegrator"  rayleighStiffness="0.01"  rayleighMass="1" />
	<CGLinearSolver template="GraphScattered" name="root_CGSolver"  iterations="25"  tolerance="1e-05"  threshold="1e-05" />
	<Node 	 name="BenderSimulation"  gravity="0 0 0"  dt="0.333333"  time="0"  animate="0"  parents="@"  >
		<Node 	 name="Skeleton"  gravity="0 0 0"  dt="0.333333"  time="0"  animate="0"  parents="@/BenderSimulation"  >
			<MechanicalObject template="Rigid" name="Skeleton_articulatedFrame"  position="2.09717 1.91819 3.03372 0.704868 0 0.00234214 0.709335 2.03236 1.97757 9.82554 0.703053 1.90587e-20 0.0111084 0.711051 1.9586 2.01513 16.2461 0.707128 0 0.0047232 0.70707"  velocity="0 0 0 0 0 0 0 0 0 0 0 0 0 0 0 0 0 0"  force="0 0 0 0 0 0 0 0 0 0 0 0 0 0 0 0 0 0"  externalForce="0 0 0 0 0 0 0 0 0 0 0 0 0 0 0 0 0 0"  derivX="0 0 0 0 0 0 0 0 0 0 0 0 0 0 0 0 0 0"  restScale="1" />
			<SkeletalMotionConstraint template="Rigid" name="Skeleton_skeletalConstaint"  joints="[ Parent -1 Channels 2 2.09717 1.91819 3.03372 0.704868 0 0.00234214 0.709335 2.09717 1.91819 3.03372 0.704868 0 0.00234214 0.709335 Times 2 0 1 PreviousMotion 0 0 0 0 0 0 1 NextMotion 0 0 0 0 0 0 1 LocalRigid 0 0 0 0 0 0 1, Parent -1 Channels 2 2.03236 1.97757 9.82554 0.703053 1.90587e-20 0.0111084 0.711051 1.69201 -1.42202 6.52227 0.995511 -0.0572144 0.0735947 0.0163643 Times 2 0 1 PreviousMotion 0 0 0 0 0 0 1 NextMotion 0 0 0 0 0 0 1 LocalRigid 0 0 0 0 0 0 1, Parent -1 Channels 2 1.9586 2.01513 16.2461 0.707128 0 0.0047232 0.70707 0.976796 -7.80189 6.64711 0.996815 -0.0524986 0.0591524 0.0102281 Times 2 0 1 PreviousMotion 0 0 0 0 0 0 1 NextMotion 0 0 0 0 0 0 1 LocalRigid 0 0 0 0 0 0 1]"  bones="[ 0, 1, 2]" />
			<Node 	 name="BoneMesh"  gravity="0 0 0"  dt="0.333333"  time="0"  animate="0"  parents="@/BenderSimulation/Skeleton"  >
				<MechanicalObject template="Vec3d" name="BoneMesh_BoneMesh"  position="1.63636 0.636364 -0.545455 2.36364 0.636364 -0.545455 0.636364 1.63636 -0.545455 1.34783 1.34783 -0.347826 2.65217 1.34783 -0.347826 2 1 0 2 1 -0.75 2.33582 1.1791 -0.664179 2.30769 1.69231 -0.692308 3.36364 1.63636 -0.545455 0.636364 2.36364 -0.545455 1.69231 2.30769 -0.692308 1.1791 2.33582 -0.664179 1.34783 2.65217 -0.347826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"  velocity="0 0 0 0 0 0 0 0 0 0 0 0 0 0 0 0 0 0 0 0 0 0 0 0 0 0 0 0 0 0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"  force="0 0 0 0 0 0 0 0 0 0 0 0 0 0 0 0 0 0 0 0 0 0 0 0 0 0 0 0 0 0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"  externalForce="0 0 0 0 0 0 0 0 0 0 0 0 0 0 0 0 0 0 0 0 0 0 0 0 0 0 0 0 0 0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"  derivX="0 0 0 0 0 0 0 0 0 0 0 0 0 0 0 0 0 0 0 0 0 0 0 0 0 0 0 0 0 0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"  restScale="1" />
				<MeshTopology name="BoneMesh_BoneTopology"  position="@BoneMesh_BoneMesh.position"  tetrahedra="3 4 5 6  6 4 7 3  1 6 0 5  0 5 6 3  4 5 6 1  1 7 6 4  7 4 8 3  3 11 12 13  10 14 15 13  13 12 15 10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" />
				<UniformMass template="Vec3d" name="BoneMesh_Mass"  totalmass="30" />
				<SkinningMapping template="Rigid,Vec3d" name="BoneMesh_SkinningMapping"  nbRef="3 3 3 3 3 3 3 3 3 3 3 3 3 3 3 3 3 3 3 3 3 3 3 3 3 3 3 3 3 3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"  indices="[ 0, 1, 2] [ 0, 1, 2] [ 0, 1, 2] [ 0, 1, 2] [ 0, 1, 2] [ 0, 1, 2] [ 0, 1, 2] [ 0, 1, 2] [ 0, 1, 2] [ 0, 1, 2] [ 0, 1, 2] [ 0, 1, 2] [ 0, 1, 2] [ 0, 1, 2] [ 0, 1, 2] [ 0, 1, 2] [ 0, 1, 2] [ 0, 1, 2] [ 0, 1, 2] [ 0, 1, 2] [ 0, 1, 2] [ 0, 1, 2] [ 0, 1, 2] [ 0, 1, 2] [ 0, 1, 2] [ 0, 1, 2] [ 0, 1, 2] [ 0, 1, 2] [ 0, 1, 2] [ 0, 1, 2] [ 0, 1, 2] [ 0, 1, 2] [ 0, 1, 2] [ 0, 1, 2] [ 0, 1, 2] [ 0, 1, 2] [ 0, 1, 2] [ 0, 1, 2] [ 0, 1, 2] [ 0, 1, 2] [ 0, 1, 2] [ 0, 1, 2] [ 0, 1, 2] [ 0, 1, 2] [ 0, 1, 2] [ 0, 1, 2] [ 0, 1, 2] [ 0, 1, 2] [ 0, 1, 2] [ 0, 1, 2] [ 0, 1, 2] [ 0, 1, 2] [ 0, 1, 2] [ 0, 1, 2] [ 0, 1, 2] [ 0, 1, 2] [ 0, 1, 2] [ 0, 1, 2] [ 0, 1, 2] [ 0, 1, 2] [ 0, 1, 2] [ 0, 1, 2] [ 0, 1, 2] [ 0, 1, 2] [ 0, 1, 2] [ 0, 1, 2] [ 0, 1, 2] [ 0, 1, 2] [ 0, 1, 2] [ 0, 1, 2] [ 0, 1, 2] [ 0, 1, 2] [ 0, 1, 2] [ 0, 1, 2] [ 0, 1, 2] [ 0, 1, 2] [ 0, 1, 2] [ 0, 1, 2] [ 0, 1, 2] [ 0, 1, 2] [ 0, 1, 2] [ 0, 1, 2] [ 0, 1, 2] [ 0, 1, 2] [ 0, 1, 2] [ 0, 1, 2] [ 0, 1, 2] [ 0, 1, 2] [ 0, 1, 2] [ 0, 1, 2] [ 0, 1, 2] [ 0, 1, 2] [ 0, 1, 2] [ 0, 1, 2] [ 0, 1, 2] [ 0, 1, 2] [ 0, 1, 2] [ 0, 1, 2] [ 0, 1, 2] [ 0, 1, 2] [ 0, 1, 2] [ 0, 1, 2] [ 0, 1, 2] [ 0, 1, 2] [ 0, 1, 2] [ 0, 1, 2] [ 0, 1, 2] [ 0, 1, 2] [ 0, 1, 2] [ 0, 1, 2] [ 0, 1, 2] [ 0, 1, 2] [ 0, 1, 2] [ 0, 1, 2] [ 0, 1, 2] [ 0, 1, 2] [ 0, 1, 2] [ 0, 1, 2] [ 0, 1, 2] [ 0, 1, 2] [ 0, 1, 2] [ 0, 1, 2] [ 0, 1, 2] [ 0, 1, 2] [ 0, 1, 2] [ 0, 1, 2] [ 0, 1, 2] [ 0, 1, 2] [ 0, 1, 2] [ 0, 1, 2] [ 0, 1, 2] [ 0, 1, 2] [ 0, 1, 2] [ 0, 1, 2] [ 0, 1, 2] [ 0, 1, 2] [ 0, 1, 2] [ 0, 1, 2] [ 0, 1, 2] [ 0, 1, 2] [ 0, 1, 2] [ 0, 1, 2] [ 0, 1, 2] [ 0, 1, 2] [ 0, 1, 2] [ 0, 1, 2] [ 0, 1, 2] [ 0, 1, 2] [ 0, 1, 2] [ 0, 1, 2] [ 0, 1, 2] [ 0, 1, 2] [ 0, 1, 2] [ 0, 1, 2] [ 0, 1, 2] [ 0, 1, 2] [ 0, 1, 2] [ 0, 1, 2] [ 0, 1, 2] [ 0, 1, 2] [ 0, 1, 2] [ 0, 1, 2] [ 0, 1, 2] [ 0, 1, 2] [ 0, 1, 2] [ 0, 1, 2] [ 0, 1, 2] [ 0, 1, 2] [ 0, 1, 2] [ 0, 1, 2] [ 0, 1, 2] [ 0, 1, 2] [ 0, 1, 2] [ 0, 1, 2] [ 0, 1, 2] [ 0, 1, 2] [ 0, 1, 2] [ 0, 1, 2] [ 0, 1, 2] [ 0, 1, 2] [ 0, 1, 2] [ 0, 1, 2] [ 0, 1, 2] [ 0, 1, 2] [ 0, 1, 2] [ 0, 1, 2] [ 0, 1, 2] [ 0, 1, 2] [ 0, 1, 2] [ 0, 1, 2] [ 0, 1, 2] [ 0, 1, 2] [ 0, 1, 2] [ 0, 1, 2] [ 0, 1, 2] [ 0, 1, 2] [ 0, 1, 2] [ 0, 1, 2] [ 0, 1, 2] [ 0, 1, 2] [ 0, 1, 2] [ 0, 1, 2] [ 0, 1, 2] [ 0, 1, 2] [ 0, 1, 2] [ 0, 1, 2] [ 0, 1, 2] [ 0, 1, 2] [ 0, 1, 2] [ 0, 1, 2] [ 0, 1, 2] [ 0, 1, 2] [ 0, 1, 2] [ 0, 1, 2] [ 0, 1, 2] [ 0, 1, 2] [ 0, 1, 2] [ 0, 1, 2] [ 0, 1, 2] [ 0, 1, 2] [ 0, 1, 2] [ 0, 1, 2] [ 0, 1, 2] [ 0, 1, 2] [ 0, 1, 2] [ 0, 1, 2] [ 0, 1, 2] [ 0, 1, 2] [ 0, 1, 2] [ 0, 1, 2] [ 0, 1, 2] [ 0, 1, 2] [ 0, 1, 2] [ 0, 1, 2] [ 0, 1, 2] [ 0, 1, 2] [ 0, 1, 2] [ 0, 1, 2] [ 0, 1, 2] [ 0, 1, 2] [ 0, 1, 2] [ 0, 1, 2] [ 0, 1, 2] [ 0, 1, 2] [ 0, 1, 2] [ 0, 1, 2] [ 0, 1, 2] [ 0, 1, 2] [ 0, 1, 2] [ 0, 1, 2] [ 0, 1, 2] [ 0, 1, 2] [ 0, 1, 2] [ 0, 1, 2] [ 0, 1, 2] [ 0, 1, 2] [ 0, 1, 2] [ 0, 1, 2] [ 0, 1, 2] [ 0, 1, 2] [ 0, 1, 2] [ 0, 1, 2] [ 0, 1, 2] [ 0, 1, 2] [ 0, 1, 2] [ 0, 1, 2] [ 0, 1, 2] [ 0, 1, 2] [ 0, 1, 2] [ 0, 1, 2] [ 0, 1, 2] [ 0, 1, 2] [ 0, 1, 2] [ 0, 1, 2] [ 0, 1, 2] [ 0, 1, 2] [ 0, 1, 2] [ 0, 1, 2] [ 0, 1, 2] [ 0, 1, 2] [ 0, 1, 2] [ 0, 1, 2] [ 0, 1, 2] [ 0, 1, 2] [ 0, 1, 2] [ 0, 1, 2] [ 0, 1, 2] [ 0, 1, 2] [ 0, 1, 2] [ 0, 1, 2] [ 0, 1, 2] [ 0, 1, 2] [ 0, 1, 2] [ 0, 1, 2] [ 0, 1, 2] [ 0, 1, 2] [ 0, 1, 2] [ 0, 1, 2] [ 0, 1, 2] [ 0, 1, 2] [ 0, 1, 2] [ 0, 1, 2] [ 0, 1, 2] [ 0, 1, 2] [ 0, 1, 2] [ 0, 1, 2] [ 0, 1, 2] [ 0, 1, 2] [ 0, 1, 2] [ 0, 1, 2] [ 0, 1, 2] [ 0, 1, 2] [ 0, 1, 2] [ 0, 1, 2] [ 0, 1, 2] [ 0, 1, 2] [ 0, 1, 2] [ 0, 1, 2] [ 0, 1, 2] [ 0, 1, 2] [ 0, 1, 2] [ 0, 1, 2] [ 0, 1, 2] [ 0, 1, 2] [ 0, 1, 2] [ 0, 1, 2] [ 0, 1, 2] [ 0, 1, 2] [ 0, 1, 2] [ 0, 1, 2] [ 0, 1, 2] [ 0, 1, 2] [ 0, 1, 2] [ 0, 1, 2] [ 0, 1, 2] [ 0, 1, 2] [ 0, 1, 2] [ 0, 1, 2] [ 0, 1, 2] [ 0, 1, 2] [ 0, 1, 2] [ 0, 1, 2] [ 0, 1, 2] [ 0, 1, 2] [ 0, 1, 2] [ 0, 1, 2] [ 0, 1, 2] [ 0, 1, 2] [ 0, 1, 2] [ 0, 1, 2] [ 0, 1, 2] [ 0, 1, 2] [ 0, 1, 2] [ 0, 1, 2] [ 0, 1, 2] [ 0, 1, 2] [ 0, 1, 2] [ 0, 1, 2] [ 0, 1, 2] [ 0, 1, 2] [ 0, 1, 2] [ 0, 1, 2] [ 0, 1, 2] [ 0, 1, 2] [ 0, 1, 2] [ 0, 1, 2] [ 0, 1, 2] [ 0, 1, 2] [ 0, 1, 2] [ 0, 1, 2] [ 0, 1, 2] [ 0, 1, 2] [ 0, 1, 2] [ 0, 1, 2] [ 0, 1, 2] [ 0, 1, 2] [ 0, 1, 2] [ 0, 1, 2] [ 0, 1, 2] [ 0, 1, 2] [ 0, 1, 2] [ 0, 1, 2] [ 0, 1, 2] [ 0, 1, 2] [ 0, 1, 2] [ 0, 1, 2] [ 0, 1, 2] [ 0, 1, 2] [ 0, 1, 2] [ 0, 1, 2] [ 0, 1, 2] [ 0, 1, 2] [ 0, 1, 2] [ 0, 1, 2] [ 0, 1, 2] [ 0, 1, 2] [ 0, 1, 2] [ 0, 1, 2] [ 0, 1, 2] [ 0, 1, 2] [ 0, 1, 2] [ 0, 1, 2] [ 0, 1, 2] [ 0, 1, 2] [ 0, 1, 2] [ 0, 1, 2] [ 0, 1, 2] [ 0, 1, 2] [ 0, 1, 2] [ 0, 1, 2] [ 0, 1, 2] [ 0, 1, 2] [ 0, 1, 2] [ 0, 1, 2] [ 0, 1, 2] [ 0, 1, 2] [ 0, 1, 2] [ 0, 1, 2] [ 0, 1, 2] [ 0, 1, 2] [ 0, 1, 2] [ 0, 1, 2] [ 0, 1, 2] [ 0, 1, 2] [ 0, 1, 2] [ 0, 1, 2] [ 0, 1, 2] [ 0, 1, 2] [ 0, 1, 2] [ 0, 1, 2] [ 0, 1, 2] [ 0, 1, 2] [ 0, 1, 2] [ 0, 1, 2] [ 0, 1, 2] [ 0, 1, 2] [ 0, 1, 2] [ 0, 1, 2] [ 0, 1, 2] [ 0, 1, 2] [ 0, 1, 2] [ 0, 1, 2] [ 0, 1, 2] [ 0, 1, 2] [ 0, 1, 2] [ 0, 1, 2] [ 0, 1, 2] [ 0, 1, 2] [ 0, 1, 2] [ 0, 1, 2] [ 0, 1, 2] [ 0, 1, 2] [ 0, 1, 2] [ 0, 1, 2] [ 0, 1, 2] [ 0, 1, 2] [ 0, 1, 2] [ 0, 1, 2] [ 0, 1, 2] [ 0, 1, 2] [ 0, 1, 2] [ 0, 1, 2] [ 0, 1, 2] [ 0, 1, 2] [ 0, 1, 2] [ 0, 1, 2] [ 0, 1, 2] [ 0, 1, 2] [ 0, 1, 2] [ 0, 1, 2] [ 0, 1, 2] [ 0, 1, 2] [ 0, 1, 2] [ 0, 1, 2] [ 0, 1, 2] [ 0, 1, 2] [ 0, 1, 2] [ 0, 1, 2] [ 0, 1, 2] [ 0, 1, 2] [ 0, 1, 2] [ 0, 1, 2] [ 0, 1, 2] [ 0, 1, 2] [ 0, 1, 2] [ 0, 1, 2] [ 0, 1, 2] [ 0, 1, 2] [ 0, 1, 2] [ 0, 1, 2] [ 0, 1, 2] [ 0, 1, 2] [ 0, 1, 2] [ 0, 1, 2] [ 0, 1, 2] [ 0, 1, 2] [ 0, 1, 2] [ 0, 1, 2] [ 0, 1, 2] [ 0, 1, 2] [ 0, 1, 2] [ 0, 1, 2] [ 0, 1, 2] [ 0, 1, 2] [ 0, 1, 2] [ 0, 1, 2] [ 0, 1, 2] [ 0, 1, 2] [ 0, 1, 2] [ 0, 1, 2] [ 0, 1, 2] [ 0, 1, 2] [ 0, 1, 2] [ 0, 1, 2] [ 0, 1, 2] [ 0, 1, 2] [ 0, 1, 2] [ 0, 1, 2] [ 0, 1, 2] [ 0, 1, 2] [ 0, 1, 2] [ 0, 1, 2] [ 0, 1, 2] [ 0, 1, 2] [ 0, 1, 2] [ 0, 1, 2] [ 0, 1, 2] [ 0, 1, 2] [ 0, 1, 2] [ 0, 1, 2] [ 0, 1, 2] [ 0, 1, 2] [ 0, 1, 2] [ 0, 1, 2] [ 0, 1, 2] [ 0, 1, 2] [ 0, 1, 2] [ 0, 1, 2] [ 0, 1, 2] [ 0, 1, 2] [ 0, 1, 2] [ 0, 1, 2] [ 0, 1, 2] [ 0, 1, 2] [ 0, 1, 2] [ 0, 1, 2] [ 0, 1, 2] [ 0, 1, 2] [ 0, 1, 2] [ 0, 1, 2] [ 0, 1, 2] [ 0, 1, 2] [ 0, 1, 2] [ 0, 1, 2] [ 0, 1, 2] [ 0, 1, 2] [ 0, 1, 2] [ 0, 1, 2] [ 0, 1, 2] [ 0, 1, 2] [ 0, 1, 2] [ 0, 1, 2] [ 0, 1, 2] [ 0, 1, 2] [ 0, 1, 2] [ 0, 1, 2] [ 0, 1, 2] [ 0, 1, 2] [ 0, 1, 2] [ 0, 1, 2] [ 0, 1, 2] [ 0, 1, 2] [ 0, 1, 2] [ 0, 1, 2] [ 0, 1, 2] [ 0, 1, 2] [ 0, 1, 2] [ 0, 1, 2] [ 0, 1, 2] [ 0, 1, 2] [ 0, 1, 2] [ 0, 1, 2] [ 0, 1, 2] [ 0, 1, 2] [ 0, 1, 2] [ 0, 1, 2] [ 0, 1, 2] [ 0, 1, 2] [ 0, 1, 2] [ 0, 1, 2] [ 0, 1, 2] [ 0, 1, 2] [ 0, 1, 2] [ 0, 1, 2] [ 0, 1, 2] [ 0, 1, 2] [ 0, 1, 2] [ 0, 1, 2] [ 0, 1, 2] [ 0, 1, 2] [ 0, 1, 2] [ 0, 1, 2] [ 0, 1, 2] [ 0, 1, 2] [ 0, 1, 2] [ 0, 1, 2] [ 0, 1, 2] [ 0, 1, 2] [ 0, 1, 2] [ 0, 1, 2] [ 0, 1, 2] [ 0, 1, 2] [ 0, 1, 2] [ 0, 1, 2] [ 0, 1, 2] [ 0, 1, 2] [ 0, 1, 2] [ 0, 1, 2] [ 0, 1, 2] [ 0, 1, 2] [ 0, 1, 2] [ 0, 1, 2] [ 0, 1, 2] [ 0, 1, 2] [ 0, 1, 2] [ 0, 1, 2] [ 0, 1, 2] [ 0, 1, 2] [ 0, 1, 2] [ 0, 1, 2] [ 0, 1, 2] [ 0, 1, 2] [ 0, 1, 2] [ 0, 1, 2] [ 0, 1, 2] [ 0, 1, 2] [ 0, 1, 2] [ 0, 1, 2] [ 0, 1, 2] [ 0, 1, 2] [ 0, 1, 2] [ 0, 1, 2] [ 0, 1, 2] [ 0, 1, 2] [ 0, 1, 2] [ 0, 1, 2] [ 0, 1, 2] [ 0, 1, 2] [ 0, 1, 2] [ 0, 1, 2] [ 0, 1, 2] [ 0, 1, 2] [ 0, 1, 2] [ 0, 1, 2] [ 0, 1, 2] [ 0, 1, 2] [ 0, 1, 2] [ 0, 1, 2] [ 0, 1, 2] [ 0, 1, 2] [ 0, 1, 2] [ 0, 1, 2] [ 0, 1, 2] [ 0, 1, 2] [ 0, 1, 2] [ 0, 1, 2] [ 0, 1, 2] [ 0, 1, 2] [ 0, 1, 2] [ 0, 1, 2] [ 0, 1, 2] [ 0, 1, 2] [ 0, 1, 2] [ 0, 1, 2] [ 0, 1, 2] [ 0, 1, 2] [ 0, 1, 2] [ 0, 1, 2] [ 0, 1, 2] [ 0, 1, 2] [ 0, 1, 2] [ 0, 1, 2] [ 0, 1, 2] [ 0, 1, 2] [ 0, 1, 2] [ 0, 1, 2] [ 0, 1, 2] [ 0, 1, 2] [ 0, 1, 2] [ 0, 1, 2] [ 0, 1, 2] [ 0, 1, 2] [ 0, 1, 2] [ 0, 1, 2] [ 0, 1, 2] [ 0, 1, 2] [ 0, 1, 2] [ 0, 1, 2] [ 0, 1, 2] [ 0, 1, 2] [ 0, 1, 2] [ 0, 1, 2] [ 0, 1, 2] [ 0, 1, 2] [ 0, 1, 2] [ 0, 1, 2] [ 0, 1, 2] [ 0, 1, 2] [ 0, 1, 2] [ 0, 1, 2] [ 0, 1, 2] [ 0, 1, 2] [ 0, 1, 2] [ 0, 1, 2] [ 0, 1, 2] [ 0, 1, 2] [ 0, 1, 2] [ 0, 1, 2] [ 0, 1, 2] [ 0, 1, 2] [ 0, 1, 2] [ 0, 1, 2] [ 0, 1, 2] [ 0, 1, 2] [ 0, 1, 2] [ 0, 1, 2] [ 0, 1, 2] [ 0, 1, 2] [ 0, 1, 2] [ 0, 1, 2] [ 0, 1, 2] [ 0, 1, 2] [ 0, 1, 2] [ 0, 1, 2] [ 0, 1, 2] [ 0, 1, 2] [ 0, 1, 2] [ 0, 1, 2] [ 0, 1, 2] [ 0, 1, 2] [ 0, 1, 2] [ 0, 1, 2] [ 0, 1, 2] [ 0, 1, 2] [ 0, 1, 2] [ 0, 1, 2] [ 0, 1, 2] [ 0, 1, 2] [ 0, 1, 2] [ 0, 1, 2] [ 0, 1, 2] [ 0, 1, 2] [ 0, 1, 2] [ 0, 1, 2] [ 0, 1, 2] [ 0, 1, 2] [ 0, 1, 2] [ 0, 1, 2] [ 0, 1, 2] [ 0, 1, 2] [ 0, 1, 2] [ 0, 1, 2] [ 0, 1, 2] [ 0, 1, 2] [ 0, 1, 2] [ 0, 1, 2] [ 0, 1, 2] [ 0, 1, 2]"  weight="[ 0.996363, 0.00363733, 0] [ 0.996303, 0.0036968, 0] [ 0.996363, 0.00363733, 0] [ 0.997907, 0.00209262, 0] [ 0.997923, 0.00207659, 0] [ 1, 0, 0] [ 1, 0, 0] [ 0.998654, 0.00134592, 0] [ 0.999538, 0.000462229, 0] [ 0.995754, 0.00424611, 0] [ 0.996303, 0.0036968, 0] [ 0.999538, 0.000462229, 0] [ 0.998654, 0.00134592, 0] [ 0.997923, 0.00207659, 0] [ 1, 0, 0] [ 1, 0, 0] [ 0.99793, 0.00207011, 0] [ 0.99863, 0.00136964, 0] [ 0.999539, 0.000460787, 0] [ 1, 0, 0] [ 1, 0, 0] [ 0.99863, 0.00136964, 0] [ 1, 0, 0] [ 1, 0, 0] [ 0.995658, 0.00434196, 0] [ 0.995754, 0.00424611, 0] [ 1, 0, 0] [ 0.995658, 0.00434196, 0] [ 1, 0, 0] [ 0.993686, 0.00631423, 0] [ 0.99359, 0.00640999, 0] [ 0.996232, 0.0037676, 0] [ 0.993686, 0.00631423, 0] [ 0.997048, 0.00295199, 0] [ 0.996554, 0.00344589, 0] [ 0.998073, 0.00192734, 0] [ 0.995154, 0.00484596, 0] [ 0.997048, 0.00295199, 0] [ 0.997071, 0.00292937, 0] [ 0.998076, 0.00192437, 0] [ 0.996567, 0.00343303, 0] [ 1, 0, 0] [ 0.992909, 0.00709089, 0] [ 0.995154, 0.00484605, 0] [ 0.997071, 0.00292937, 0] [ 0.996232, 0.0037676, 0] [ 0.99359, 0.00640999, 0] [ 0.998076, 0.00192437, 0] [ 1, 0, 0] [ 0.997071, 0.00292937, 0] [ 0.996567, 0.00343303, 0] [ 0.99806, 0.00193993, 0] [ 0.995329, 0.00467059, 0] [ 0.992754, 0.00724587, 0] [ 1, 0, 0] [ 0.99708, 0.00292023, 0] [ 0.996553, 0.00344705, 0] [ 0.997071, 0.00292937, 0] [ 0.992909, 0.00709089, 0] [ 0.995154, 0.00484605, 0] [ 0.99708, 0.00292023, 0] [ 0.992754, 0.00724587, 0] [ 1, 0, 0] [ 0.995329, 0.00467059, 0] [ 0.995101, 0.00489895, 0] [ 0.985255, 0.0147449, 0] [ 0.985107, 0.0148931, 0] [ 0.985255, 0.0147449, 0] [ 0.993701, 0.00629925, 0] [ 0.992309, 0.0076915, 0] [ 0.995592, 0.00440764, 0] [ 0.988729, 0.0112711, 0] [ 0.993701, 0.00629925, 0] [ 0.995575, 0.00442473, 0] [ 0.993692, 0.00630762, 0] [ 0.992285, 0.00771461, 0] [ 1, 0, 0] [ 0.991657, 0.00834317, 0] [ 1, 0, 0] [ 0.984301, 0.0156987, 0] [ 0.988678, 0.0113216, 0] [ 0.993692, 0.00630762, 0] [ 0.991657, 0.00834317, 0] [ 0.985107, 0.0148931, 0] [ 0.995575, 0.00442473, 0] [ 1, 0, 0] [ 0.993692, 0.00630762, 0] [ 0.992285, 0.00771461, 0] [ 0.995516, 0.00448412, 0] [ 0.990497, 0.00950273, 0] [ 0.984071, 0.0159289, 0] [ 1, 0, 0] [ 0.993609, 0.00639143, 0] [ 0.992182, 0.00781779, 0] [ 0.993692, 0.00630762, 0] [ 0.984301, 0.0156987, 0] [ 0.988678, 0.0113216, 0] [ 0.993609, 0.00639143, 0] [ 0.984071, 0.0159289, 0] [ 1, 0, 0] [ 0.990497, 0.00950273, 0] [ 0.988526, 0.0114739, 0] [ 0.966704, 0.0332956, 3.05176e-07] [ 0.966515, 0.0334852, 2.48948e-07] [ 0.966704, 0.0332956, 3.05176e-07] [ 0.985143, 0.0148574, 0] [ 0.982424, 0.0175756, 1.36764e-07] [ 0.990097, 0.00990287, 1.19209e-07] [ 0.974971, 0.0250288, 3.76101e-07] [ 0.985143, 0.0148574, 0] [ 0.990054, 0.00994615, 6.06383e-08] [ 0.985069, 0.0149311, 0] [ 0.982344, 0.0176561, 6.95679e-08] [ 1, 0, 0] [ 0.979859, 0.0201413, 0] [ 1, 0, 0] [ 0.965726, 0.0342734, 5.61363e-07] [ 0.974865, 0.0251345, 1.91311e-07] [ 0.985069, 0.0149311, 0] [ 0.979859, 0.0201413, 0] [ 0.966515, 0.0334852, 2.48948e-07] [ 0.990054, 0.00994615, 6.06383e-08] [ 1, 0, 0] [ 0.985069, 0.0149311, 0] [ 0.982344, 0.0176561, 6.95679e-08] [ 0.989959, 0.0100406, 2.06727e-09] [ 0.978517, 0.0214835, 0] [ 0.965461, 0.0345386, 4.10207e-07] [ 1, 0, 0] [ 0.984868, 0.0151323, 0] [ 0.982151, 0.0178486, 2.3717e-09] [ 0.985069, 0.0149311, 0] [ 0.965726, 0.0342734, 5.61363e-07] [ 0.974865, 0.0251345, 1.91311e-07] [ 0.984868, 0.0151323, 0] [ 0.965461, 0.0345386, 4.10207e-07] [ 1, 0, 0] [ 0.978517, 0.0214835, 0] [ 0.974652, 0.0253483, 6.52216e-09] [ 0.92971, 0.0702835, 6.63463e-06] [ 0.929532, 0.0704615, 6.18212e-06] [ 0.92971, 0.0702835, 6.63463e-06] [ 0.967323, 0.0326764, 5.72205e-07] [ 0.961885, 0.038112, 3.05723e-06] [ 0.978691, 0.0213068, 2.45619e-06] [ 0.946438, 0.0535545, 7.50986e-06] [ 0.967323, 0.0326764, 5.72205e-07] [ 0.978633, 0.0213652, 1.86364e-06] [ 0.967189, 0.0328104, 2.91064e-07] [ 0.961763, 0.038235, 2.25982e-06] [ 1, 0, 0] [ 0.955576, 0.0444239, 5.72204e-07] [ 1, 0, 0] [ 0.928988, 0.0710021, 1.03599e-05] [ 0.946312, 0.0536826, 5.75796e-06] [ 0.967189, 0.0328104, 2.91064e-07] [ 0.955576, 0.0444239, 5.72205e-07] [ 0.929532, 0.0704615, 6.18212e-06] [ 0.978633, 0.0213651, 1.86364e-06] [ 1, 0, 0] [ 0.967189, 0.0328104, 2.91064e-07] [ 0.961763, 0.038235, 2.25982e-06] [ 0.978539, 0.0214604, 7.4722e-07] [ 0.954409, 0.0455893, 1.33369e-06] [ 0.928772, 0.0712192, 8.68209e-06] [ 1, 0, 0] [ 0.966937, 0.0330625, 9.9229e-09] [ 0.961549, 0.0384497, 8.61406e-07] [ 0.967189, 0.0328104, 2.91064e-07] [ 0.928988, 0.0710021, 1.03599e-05] [ 0.946312, 0.0536826, 5.75797e-06] [ 0.966937, 0.0330625, 9.9229e-09] [ 0.928772, 0.0712192, 8.68209e-06] [ 1, 0, 0] [ 0.954409, 0.0455893, 1.33369e-06] [ 0.94612, 0.0538775, 2.3533e-06] [ 0.854179, 0.145755, 6.59572e-05] [ 0.854074, 0.145861, 6.50079e-05] [ 0.854179, 0.145755, 6.59572e-05] [ 0.930393, 0.0695961, 1.12175e-05] [ 0.916404, 0.0835647, 3.09517e-05] [ 0.952512, 0.047465, 2.28891e-05] [ 0.879292, 0.12064, 6.75222e-05] [ 0.930393, 0.0695961, 1.12175e-05] [ 0.952462, 0.0475176, 2.02495e-05] [ 0.930249, 0.0697423, 8.6544e-06] [ 0.916287, 0.0836863, 2.68513e-05] [ 1, 0, 0] [ 0.908086, 0.0919025, 1.14652e-05] [ 1, 0, 0] [ 0.853924, 0.145985, 9.11357e-05] [ 0.879195, 0.120745, 6.02666e-05] [ 0.930249, 0.0697423, 8.6544e-06] [ 0.908086, 0.0919025, 1.14652e-05] [ 0.854074, 0.145861, 6.50079e-05] [ 0.952462, 0.0475176, 2.02495e-05] [ 1, 0, 0] [ 0.930249, 0.0697423, 8.6544e-06] [ 0.916287, 0.0836863, 2.68514e-05] [ 0.952403, 0.0475823, 1.42756e-05] [ 0.907467, 0.0925129, 2.05969e-05] [ 0.853825, 0.146089, 8.55846e-05] [ 1, 0, 0] [ 0.930049, 0.0699472, 3.57673e-06] [ 0.916136, 0.0838461, 1.78738e-05] [ 0.930249, 0.0697423, 8.6544e-06] [ 0.853924, 0.145985, 9.11357e-05] [ 0.879195, 0.120745, 6.02666e-05] [ 0.930049, 0.0699472, 3.57673e-06] [ 0.853825, 0.146089, 8.55846e-05] [ 1, 0, 0] [ 0.907467, 0.0925128, 2.0597e-05] [ 0.879093, 0.120863, 4.35428e-05] [ 0.497438, 0.502164, 0.000398675] [ 0.497434, 0.502164, 0.000401804] [ 0.497438, 0.502164, 0.000398675] [ 0.841666, 0.158236, 9.86501e-05] [ 0.6663, 0.333509, 0.000191108] [ 0.499297, 0.500573, 0.000130611] [ 0.330674, 0.668955, 0.000370812] [ 0.841666, 0.158236, 9.86501e-05] [ 0.499272, 0.500604, 0.000123818] [ 0.841569, 0.158342, 8.85433e-05] [ 0.666231, 0.33359, 0.000179086] [ 0, 1, 0] [ 0.811148, 0.188743, 0.000109209] [ 1, 0, 0] [ 0.497671, 0.501826, 0.000502873] [ 0.330636, 0.66901, 0.000353605] [ 0.841569, 0.158342, 8.85433e-05] [ 0.811148, 0.188743, 0.000109209] [ 0.497434, 0.502164, 0.000401804] [ 0.499272, 0.500605, 0.000123818] [ 0, 1, 0] [ 0.841569, 0.158342, 8.85433e-05] [ 0.666231, 0.33359, 0.000179086] [ 0.499263, 0.500627, 0.000109768] [ 0.811213, 0.18862, 0.000166548] [ 0.497703, 0.501796, 0.000500943] [ 0, 1, 0] [ 0.841487, 0.158448, 6.49459e-05] [ 0.666186, 0.333661, 0.000153097] [ 0.841569, 0.158342, 8.85433e-05] [ 0.497671, 0.501826, 0.000502873] [ 0.330636, 0.66901, 0.000353605] [ 0.841487, 0.158448, 6.49459e-05] [ 0.497703, 0.501796, 0.000500943] [ 0, 1, 0] [ 0.811213, 0.18862, 0.000166548] [ 0.330642, 0.669039, 0.000319149] [ 0.141538, 0.856777, 0.00168558] [ 0.14162, 0.856671, 0.00170902] [ 0.141538, 0.856777, 0.00168558] [ 0.154959, 0.844513, 0.000528285] [ 0.11794, 0.881233, 0.000827031] [ 0.0463063, 0.953165, 0.000528271] [ 0.08128, 0.917274, 0.00144571] [ 0.154959, 0.844513, 0.000528285] [ 0.0463099, 0.953172, 0.000518269] [ 0.154935, 0.844559, 0.000505782] [ 0.117934, 0.88126, 0.000806143] [ 0, 1, 0] [ 0.183797, 0.815568, 0.000635109] [ 0, 1, 0] [ 0.142113, 0.855909, 0.00197804] [ 0.0813009, 0.917275, 0.00142357] [ 0.154935, 0.844559, 0.000505782] [ 0.183797, 0.815568, 0.000635109] [ 0.14162, 0.856671, 0.00170902] [ 0.0463099, 0.953172, 0.000518269] [ 0, 1, 0] [ 0.154935, 0.844559, 0.000505782] [ 0.117934, 0.88126, 0.000806143] [ 0.0463427, 0.953152, 0.000505692] [ 0.184417, 0.814727, 0.000856537] [ 0.142243, 0.855744, 0.00201314] [ 0, 1, 0] [ 0.154974, 0.844564, 0.00046194] [ 0.117988, 0.881238, 0.000773375] [ 0.154935, 0.844559, 0.000505782] [ 0.142113, 0.855909, 0.00197804] [ 0.0813009, 0.917275, 0.00142357] [ 0.154974, 0.844564, 0.00046194] [ 0.142243, 0.855744, 0.00201314] [ 0, 1, 0] [ 0.184417, 0.814727, 0.000856537] [ 0.081388, 0.91721, 0.00140222] [ 0.0680991, 0.926451, 0.00544974] [ 0.0682286, 0.926251, 0.00552037] [ 0.0680991, 0.926451, 0.00544974] [ 0.0673118, 0.930681, 0.00200742] [ 0.0518908, 0.945369, 0.00274003] [ 0.0206894, 0.977654, 0.00165645] [ 0.0371198, 0.958494, 0.00438641] [ 0.0673118, 0.930681, 0.00200742] [ 0.0207136, 0.977634, 0.00165225] [ 0.0673523, 0.930666, 0.00198191] [ 0.0519355, 0.94534, 0.00272453] [ 0, 1, 0] [ 0.0885222, 0.908912, 0.00256588] [ 0, 1, 0] [ 0.0688118, 0.925151, 0.00603715] [ 0.0371792, 0.958437, 0.00438381] [ 0.0673523, 0.930666, 0.00198191] [ 0.0885222, 0.908912, 0.00256588] [ 0.0682286, 0.926251, 0.00552037] [ 0.0207136, 0.977634, 0.00165225] [ 0, 1, 0] [ 0.0673523, 0.930666, 0.00198191] [ 0.0519355, 0.94534, 0.00272453] [ 0.0207687, 0.977565, 0.00166622] [ 0.0894255, 0.907444, 0.00313005] [ 0.0689858, 0.924858, 0.00615606] [ 0, 1, 0] [ 0.0674705, 0.930564, 0.00196538] [ 0.0520481, 0.945218, 0.00273365] [ 0.0673523, 0.930666, 0.00198191] [ 0.0688118, 0.925151, 0.00603715] [ 0.0371792, 0.958437, 0.00438381] [ 0.0674705, 0.930564, 0.00196538] [ 0.0689858, 0.924858, 0.00615606] [ 0, 1, 0] [ 0.0894255, 0.907444, 0.00313005] [ 0.0373035, 0.958262, 0.0044348] [ 0.0334053, 0.952169, 0.0144258] [ 0.0335419, 0.951896, 0.0145621] [ 0.0334053, 0.952169, 0.0144258] [ 0.0319975, 0.962059, 0.00594356] [ 0.0247478, 0.967826, 0.00742666] [ 0.00990546, 0.985788, 0.00430647] [ 0.0178677, 0.971032, 0.0111007] [ 0.0319975, 0.962059, 0.00594356] [ 0.00993849, 0.985739, 0.0043225] [ 0.0320732, 0.961978, 0.00594889] [ 0.0248173, 0.967735, 0.00744727] [ 0, 1, 0] [ 0.0435087, 0.948594, 0.007897] [ 0, 1, 0] [ 0.0340846, 0.950623, 0.0152928] [ 0.0179402, 0.970911, 0.0111491] [ 0.0320732, 0.961978, 0.00594889] [ 0.0435087, 0.948594, 0.007897] [ 0.0335419, 0.951896, 0.0145621] [ 0.00993849, 0.985739, 0.0043225] [ 0, 1, 0] [ 0.0320732, 0.961978, 0.00594889] [ 0.0248173, 0.967735, 0.00744727] [ 0.00999721, 0.985621, 0.00438202] [ 0.0444377, 0.946662, 0.00889994] [ 0.0342568, 0.950235, 0.0155078] [ 0, 1, 0] [ 0.0322193, 0.961748, 0.00603248] [ 0.0249458, 0.967504, 0.00755052] [ 0.0320732, 0.961978, 0.00594889] [ 0.0340846, 0.950623, 0.0152928] [ 0.0179402, 0.970911, 0.0111491] [ 0.0322193, 0.961748, 0.00603248] [ 0.0342568, 0.950235, 0.0155078] [ 0, 1, 0] [ 0.0444377, 0.946662, 0.00889994] [ 0.0180644, 0.970634, 0.0113019] [ 0.0162915, 0.950527, 0.0331814] [ 0.0164091, 0.950225, 0.0333657] [ 0.0162915, 0.950527, 0.0331814] [ 0.0155487, 0.969724, 0.0147275] [ 0.0120141, 0.970507, 0.0174793] [ 0.00480319, 0.985331, 0.00986631] [ 0.00865029, 0.966382, 0.0249677] [ 0.0155487, 0.969724, 0.0147275] [ 0.0048354, 0.985256, 0.00990884] [ 0.0156315, 0.969569, 0.0147991] [ 0.0120857, 0.970356, 0.017558] [ 0, 1, 0] [ 0.0213033, 0.958716, 0.0199804] [ 0, 1, 0] [ 0.0168432, 0.949035, 0.0341218] [ 0.00871728, 0.966211, 0.025072] [ 0.0156315, 0.969569, 0.0147991] [ 0.0213033, 0.958716, 0.0199804] [ 0.0164091, 0.950225, 0.0333657] [ 0.0048354, 0.985256, 0.00990884] [ 0, 1, 0] [ 0.0156315, 0.969569, 0.0147991] [ 0.0120857, 0.970356, 0.017558] [ 0.00488597, 0.98511, 0.0100036] [ 0.0220946, 0.956651, 0.0212542] [ 0.0169865, 0.948633, 0.0343807] [ 0, 1, 0] [ 0.0157673, 0.969232, 0.0150012] [ 0.0122005, 0.970048, 0.0177512] [ 0.0156315, 0.969569, 0.0147991] [ 0.0168432, 0.949035, 0.0341218] [ 0.00871728, 0.966211, 0.025072] [ 0.0157673, 0.969232, 0.0150012] [ 0.0169865, 0.948633, 0.0343807] [ 0, 1, 0] [ 0.0220946, 0.956651, 0.0212542] [ 0.00882005, 0.965894, 0.0252862] [ 0.00781412, 0.921936, 0.0702501] [ 0.00790253, 0.921672, 0.0704254] [ 0.00781412, 0.921936, 0.0702501] [ 0.00750659, 0.959863, 0.0326308] [ 0.00578503, 0.956134, 0.0380809] [ 0.0023057, 0.976398, 0.0212963] [ 0.00413462, 0.942325, 0.0535404] [ 0.00750659, 0.959863, 0.0326308] [ 0.00233189, 0.976314, 0.0213537] [ 0.00757841, 0.959658, 0.0327633] [ 0.00584512, 0.955953, 0.0382022] [ 0, 1, 0] [ 0.0102763, 0.945356, 0.0443679] [ 0, 1, 0] [ 0.00821319, 0.92083, 0.0709568] [ 0.0041872, 0.942147, 0.0536661] [ 0.00757841, 0.959658, 0.0327633] [ 0.0102763, 0.945356, 0.0443679] [ 0.00790253, 0.921672, 0.0704254] [ 0.00233189, 0.976314, 0.0213537] [ 0, 1, 0] [ 0.00757841, 0.959658, 0.0327633] [ 0.00584512, 0.955953, 0.0382022] [ 0.00236981, 0.976182, 0.021448] [ 0.0108685, 0.943626, 0.0455056] [ 0.0083189, 0.920511, 0.0711698] [ 0, 1, 0] [ 0.00768539, 0.959299, 0.0330158] [ 0.00593336, 0.955651, 0.038416] [ 0.00757841, 0.959658, 0.0327633] [ 0.00821319, 0.92083, 0.0709568] [ 0.0041872, 0.942147, 0.0536661] [ 0.00768539, 0.959299, 0.0330158] [ 0.0083189, 0.920511, 0.0711698] [ 0, 1, 0] [ 0.0108685, 0.943626, 0.0455056] [ 0.00426208, 0.94188, 0.053858] [ 0.0036692, 0.850523, 0.145807] [ 0.00372917, 0.85036, 0.145911] [ 0.0036692, 0.850523, 0.145807] [ 0.00356079, 0.926848, 0.0695913] [ 0.00273546, 0.913681, 0.0835838] [ 0.00108614, 0.95143, 0.0474834] [ 0.00193735, 0.877362, 0.1207] [ 0.00356079, 0.926848, 0.0695913] [ 0.00110494, 0.951362, 0.0475332] [ 0.00361467, 0.926651, 0.0697343] [ 0.00277957, 0.91352, 0.0837008] [ 0, 1, 0] [ 0.00485817, 0.903247, 0.0918946] [ 0, 1, 0] [ 0.00393283, 0.850011, 0.146056] [ 0.00197413, 0.877228, 0.120798] [ 0.00361467, 0.926651, 0.0697343] [ 0.00485817, 0.903247, 0.0918946] [ 0.00372917, 0.85036, 0.145911] [ 0.00110494, 0.951362, 0.0475332] [ 0, 1, 0] [ 0.00361467, 0.926651, 0.0697343] [ 0.00277957, 0.91352, 0.0837008] [ 0.00113059, 0.951277, 0.047592] [ 0.00525981, 0.902238, 0.0925026] [ 0.00400388, 0.849842, 0.146154] [ 0, 1, 0] [ 0.00368969, 0.926376, 0.0699345] [ 0.00284038, 0.913308, 0.0838519] [ 0.00361467, 0.926651, 0.0697343] [ 0.00393283, 0.850011, 0.146056] [ 0.00197413, 0.877228, 0.120798] [ 0.00368969, 0.926376, 0.0699345] [ 0.00400388, 0.849842, 0.146154] [ 0, 1, 0] [ 0.00525981, 0.902238, 0.0925026] [ 0.00202368, 0.877077, 0.120899] [ 0.00168369, 0.495759, 0.502558] [ 0.00172116, 0.495718, 0.502561] [ 0.00168369, 0.495759, 0.502558] [ 0.00165268, 0.840019, 0.158329] [ 0.00126543, 0.665039, 0.333696] [ 0.000500459, 0.498798, 0.500702] [ 0.00088766, 0.329789, 0.669323] [ 0.00165268, 0.840019, 0.158329] [ 0.000512737, 0.498761, 0.500727] [ 0.00168904, 0.839886, 0.158425] [ 0.00129472, 0.66494, 0.333765] [ 0, 0, 1] [ 0.00224566, 0.808909, 0.188845] [ 0, 1, 0] [ 0.00184538, 0.495833, 0.502322] [ 0.000911188, 0.329728, 0.669361] [ 0.00168904, 0.839886, 0.158425] [ 0.00224566, 0.808909, 0.188845] [ 0.00172116, 0.495718, 0.502561] [ 0.000512737, 0.498761, 0.500727] [ 0, 0, 1] [ 0.00168904, 0.839886, 0.158425] [ 0.00129472, 0.66494, 0.333765] [ 0.000528735, 0.498736, 0.500736] [ 0.00249731, 0.808727, 0.188776] [ 0.00188966, 0.495821, 0.502289] [ 0, 0, 1] [ 0.00173714, 0.839756, 0.158507] [ 0.00133319, 0.664857, 0.333809] [ 0.00168904, 0.839886, 0.158425] [ 0.00184538, 0.495833, 0.502322] [ 0.000911188, 0.329728, 0.669361] [ 0.00173714, 0.839756, 0.158507] [ 0.00188966, 0.495821, 0.502289] [ 0, 0, 1] [ 0.00249731, 0.808727, 0.188776] [ 0.00094154, 0.329703, 0.669355] [ 0.000754709, 0.140785, 0.85846] [ 0.000776581, 0.140846, 0.858377] [ 0.000754708, 0.140785, 0.85846] [ 0.000749522, 0.154211, 0.845039] [ 0.00057203, 0.11737, 0.882058] [ 0.000225342, 0.0460818, 0.953693] [ 0.000397442, 0.0808843, 0.918718] [ 0.000749522, 0.154211, 0.845039] [ 0.000232773, 0.046078, 0.953689] [ 0.000772097, 0.154165, 0.845063] [ 0.000589997, 0.117346, 0.882064] [ 0, 0, 1] [ 0.00101421, 0.182785, 0.8162] [ 0, 0, 1] [ 0.000847856, 0.141269, 0.857883] [ 0.000411444, 0.0808914, 0.918697] [ 0.000772097, 0.154165, 0.845063] [ 0.00101421, 0.182785, 0.8162] [ 0.000776581, 0.140846, 0.858377] [ 0.000232773, 0.046078, 0.953689] [ 0, 0, 1] [ 0.000772097, 0.154165, 0.845063] [ 0.000589997, 0.117346, 0.882064] [ 0.000242103, 0.0461014, 0.953656] [ 0.0011618, 0.183259, 0.815579] [ 0.000873763, 0.141374, 0.857753] [ 0, 0, 1] [ 0.000800783, 0.154175, 0.845024] [ 0.0006127, 0.117377, 0.88201] [ 0.000772097, 0.154165, 0.845063] [ 0.000847856, 0.141269, 0.857883] [ 0.000411444, 0.0808914, 0.918697] [ 0.000800783, 0.154175, 0.845024] [ 0.000873763, 0.141374, 0.857753] [ 0, 0, 1] [ 0.0011618, 0.183259, 0.815579] [ 0.000428882, 0.0809609, 0.91861] [ 0.000330577, 0.0677748, 0.931895] [ 0.000342629, 0.0678927, 0.931765] [ 0.000330577, 0.0677748, 0.931895] [ 0.00033212, 0.0669817, 0.932686] [ 0.000252682, 0.0516413, 0.948106] [ 9.91635e-05, 0.0205923, 0.979309] [ 0.000173941, 0.0369514, 0.962875] [ 0.00033212, 0.0669817, 0.932686] [ 0.000103385, 0.0206124, 0.979284] [ 0.000345213, 0.0670092, 0.932646] [ 0.000263003, 0.0516758, 0.948061] [ 0, 0, 1] [ 0.00044759, 0.088077, 0.911475] [ 0, 0, 1] [ 0.000381428, 0.0684395, 0.931179] [ 0.000181783, 0.0370033, 0.962815] [ 0.000345213, 0.0670092, 0.932646] [ 0.00044759, 0.088077, 0.911475] [ 0.000342629, 0.0678927, 0.931765] [ 0.000103385, 0.0206124, 0.979284] [ 0, 0, 1] [ 0.000345213, 0.0670092, 0.932646] [ 0.000263003, 0.0516758, 0.948061] [ 0.000108526, 0.0206624, 0.979229] [ 0.00052941, 0.0889004, 0.91057] [ 0.000395786, 0.0685997, 0.931004] [ 0, 0, 1] [ 0.000361313, 0.0671113, 0.932527] [ 0.000275635, 0.0517758, 0.947949] [ 0.000345213, 0.0670092, 0.932646] [ 0.000381428, 0.0684395, 0.931179] [ 0.000181783, 0.0370033, 0.962815] [ 0.000361313, 0.0671113, 0.932527] [ 0.000395786, 0.0685997, 0.931004] [ 0, 0, 1] [ 0.00052941, 0.0889004, 0.91057] [ 0.00019127, 0.0371182, 0.96269] [ 0.000141612, 0.0332899, 0.966569] [ 0.00014793, 0.0334218, 0.96643] [ 0.000141612, 0.0332899, 0.966569] [ 0.000143865, 0.0318614, 0.967995] [ 0.000109137, 0.0246513, 0.97524] [ 4.2678e-05, 0.009871, 0.990086] [ 7.44729e-05, 0.0178159, 0.98211] [ 0.000143865, 0.0318614, 0.967995] [ 4.49509e-05, 0.00990223, 0.990053] [ 0.000151035, 0.0319304, 0.967919] [ 0.000114744, 0.024716, 0.975169] [ 0, 0, 1] [ 0.000193137, 0.0433251, 0.956482] [ 0, 0, 1] [ 0.000168109, 0.0339516, 0.96588] [ 7.86447e-05, 0.0178856, 0.982036] [ 0.000151035, 0.0319304, 0.967919] [ 0.000193137, 0.0433251, 0.956482] [ 0.00014793, 0.0334218, 0.96643] [ 4.49509e-05, 0.00990223, 0.990053] [ 0, 0, 1] [ 0.000151035, 0.0319304, 0.967919] [ 0.000114744, 0.024716, 0.975169] [ 4.76492e-05, 0.00995867, 0.989994] [ 0.00023634, 0.0442165, 0.955547] [ 0.000175702, 0.0341183, 0.965706] [ 0, 0, 1] [ 0.000159614, 0.0320681, 0.967772] [ 0.000121428, 0.0248383, 0.97504] [ 0.000151035, 0.0319304, 0.967919] [ 0.000168109, 0.0339516, 0.96588] [ 7.86447e-05, 0.0178856, 0.982036] [ 0.000159614, 0.0320681, 0.967772] [ 0.000175702, 0.0341183, 0.965706] [ 0, 0, 1] [ 0.00023634, 0.0442165, 0.955547] [ 8.35694e-05, 0.0180061, 0.98191] [ 5.94542e-05, 0.0163281, 0.983612] [ 6.26337e-05, 0.0164476, 0.98349] [ 5.94542e-05, 0.0163281, 0.983612] [ 6.09894e-05, 0.0155194, 0.98442] [ 4.6163e-05, 0.0120151, 0.987939] [ 1.80019e-05, 0.00481471, 0.995167] [ 3.12851e-05, 0.00869889, 0.99127] [ 6.09894e-05, 0.0155194, 0.98442] [ 1.91731e-05, 0.00484733, 0.995133] [ 6.47292e-05, 0.0156003, 0.984335] [ 4.90709e-05, 0.0120863, 0.987865] [ 0, 0, 1] [ 8.158e-05, 0.0212624, 0.978656] [ 0, 0, 1] [ 7.2745e-05, 0.0168907, 0.983037] [ 3.34162e-05, 0.00876798, 0.991199] [ 6.47292e-05, 0.0156003, 0.984335] [ 8.158e-05, 0.0212624, 0.978656] [ 6.26337e-05, 0.0164476, 0.98349] [ 1.91731e-05, 0.00484733, 0.995133] [ 0, 0, 1] [ 6.47292e-05, 0.0156003, 0.984335] [ 4.90709e-05, 0.0120863, 0.987865] [ 2.05335e-05, 0.00489837, 0.995081] [ 0.000103456, 0.0220489, 0.977848] [ 7.66104e-05, 0.0170365, 0.982887] [ 0, 0, 1] [ 6.9102e-05, 0.0157335, 0.984197] [ 5.24606e-05, 0.0122006, 0.987747] [ 6.47292e-05, 0.0156003, 0.984335] [ 7.27449e-05, 0.0168907, 0.983037] [ 3.34161e-05, 0.00876798, 0.991199] [ 6.9102e-05, 0.0157335, 0.984197] [ 7.66104e-05, 0.0170365, 0.982887] [ 0, 0, 1] [ 0.000103456, 0.0220489, 0.977848] [ 3.58789e-05, 0.00887327, 0.991091] [ 2.48057e-05, 0.00809043, 0.991885] [ 2.63812e-05, 0.00818951, 0.991784] [ 2.48057e-05, 0.00809043, 0.991885] [ 2.54197e-05, 0.00759117, 0.992383] [ 1.92916e-05, 0.00591609, 0.994065] [ 7.54776e-06, 0.0023891, 0.997603] [ 1.31806e-05, 0.00436235, 0.995624] [ 2.54197e-05, 0.00759117, 0.992383] [ 8.14122e-06, 0.00241883, 0.997573] [ 2.73019e-05, 0.00766687, 0.992306] [ 2.07597e-05, 0.00598185, 0.993997] [ 0, 0, 1] [ 3.38818e-05, 0.0103873, 0.989579] [ 0, 0, 1] [ 3.13887e-05, 0.00853696, 0.991432] [ 1.42656e-05, 0.00442447, 0.995561] [ 2.73019e-05, 0.00766687, 0.992306] [ 3.38818e-05, 0.0103873, 0.989579] [ 2.63812e-05, 0.00818951, 0.991784] [ 8.14122e-06, 0.00241883, 0.997573] [ 0, 0, 1] [ 2.73019e-05, 0.00766687, 0.992306] [ 2.07597e-05, 0.00598185, 0.993997] [ 8.81714e-06, 0.00246123, 0.99753] [ 4.46345e-05, 0.0110122, 0.988943] [ 3.33336e-05, 0.00865586, 0.991311] [ 0, 0, 1] [ 2.94587e-05, 0.00777862, 0.992192] [ 2.24373e-05, 0.00607725, 0.9939] [ 2.73019e-05, 0.00766687, 0.992306] [ 3.13887e-05, 0.00853696, 0.991432] [ 1.42656e-05, 0.00442447, 0.995561] [ 2.94587e-05, 0.00777862, 0.992192] [ 3.33336e-05, 0.00865586, 0.991311] [ 0, 0, 1] [ 4.46345e-05, 0.0110122, 0.988943] [ 1.5496e-05, 0.00451151, 0.995473] [ 1.14947e-05, 0.00448102, 0.995508] [ 1.23656e-05, 0.00456479, 0.995423] [ 1.14947e-05, 0.00448102, 0.995508] [ 1.08096e-05, 0.0038765, 0.996113] [ 8.55409e-06, 0.00314504, 0.996846] [ 3.5151e-06, 0.00132804, 0.998668] [ 6.56866e-06, 0.00256849, 0.997425] [ 1.08096e-05, 0.0038765, 0.996113] [ 3.85167e-06, 0.00135524, 0.998641] [ 1.1776e-05, 0.00394349, 0.996045] [ 9.34441e-06, 0.00320427, 0.996787] [ 0, 0, 1] [ 1.4354e-05, 0.00528197, 0.994704] [ 0, 0, 1] [ 1.51226e-05, 0.00484182, 0.995143] [ 7.22631e-06, 0.00262629, 0.997366] [ 1.1776e-05, 0.00394349, 0.996045] [ 1.4354e-05, 0.00528197, 0.994704] [ 1.23656e-05, 0.00456479, 0.995423] [ 3.85167e-06, 0.00135524, 0.998641] [ 0, 0, 1] [ 1.1776e-05, 0.00394349, 0.996045] [ 9.34441e-06, 0.00320427, 0.996786] [ 4.22995e-06, 0.00139154, 0.998604] [ 1.97658e-05, 0.00576869, 0.994211] [ 1.62191e-05, 0.00494084, 0.995043] [ 0, 0, 1] [ 1.28636e-05, 0.00403529, 0.995952] [ 1.02333e-05, 0.0032843, 0.996705] [ 1.1776e-05, 0.00394349, 0.996045] [ 1.51226e-05, 0.00484182, 0.995143] [ 7.22631e-06, 0.00262629, 0.997366] [ 1.28636e-05, 0.00403529, 0.995952] [ 1.62191e-05, 0.00494084, 0.995043] [ 0, 0, 1] [ 1.97658e-05, 0.00576869, 0.994211] [ 7.96486e-06, 0.0027024, 0.99729] [ 7.588e-06, 0.00322221, 0.99677] [ 8.19276e-06, 0.0032906, 0.996701] [ 8.03895e-06, 0.0033955, 0.996596] [ 7.588e-06, 0.00322221, 0.99677] [ 6.06287e-06, 0.00249809, 0.997496] [ 4.29788e-06, 0.00177086, 0.998225] [ 6.06287e-06, 0.00249809, 0.997496] [ 4.75806e-06, 0.00181593, 0.998179] [ 6.71203e-06, 0.00256167, 0.997432] [ 3.08388e-06, 0.00117698, 0.99882] [ 0, 0, 1] [ 0, 0, 1] [ 1.0172e-05, 0.00351997, 0.99647] [ 6.71203e-06, 0.00256167, 0.997432] [ 8.03895e-06, 0.0033955, 0.996596] [ 8.19276e-06, 0.0032906, 0.996701] [ 4.75806e-06, 0.00181593, 0.998179] [ 3.08388e-06, 0.00117698, 0.99882] [ 0, 0, 1] [ 6.71203e-06, 0.00256167, 0.997432] [ 5.27423e-06, 0.00187436, 0.99812] [ 1.1538e-05, 0.00380003, 0.996188] [ 1.09363e-05, 0.0036004, 0.996389] [ 3.48958e-06, 0.00124013, 0.998756] [ 0, 0, 1] [ 7.44018e-06, 0.00264409, 0.997348] [ 6.71203e-06, 0.00256167, 0.997432] [ 1.0172e-05, 0.00351997, 0.99647] [ 7.44018e-06, 0.00264409, 0.997348] [ 1.09363e-05, 0.0036004, 0.996389] [ 0, 0, 1] [ 3.48958e-06, 0.00124013, 0.998756] [ 1.1538e-05, 0.00380003, 0.996188] [ 1.0591e-06, 0.000404209, 0.999595] [ 1.0591e-06, 0.000404209, 0.999595] [ 1.17399e-06, 0.000417214, 0.999582] [ 0, 0, 1]"  input="@/BenderSimulation/Skeleton/Skeleton_articulatedFrame"  output="@BoneMesh_BoneMesh" />
				<Node 	 name="AnatomicalMesh"  gravity="0 0 0"  dt="0.333333"  time="0"  animate="0"  parents="@/BenderSimulation/Skeleton"  >
					<MechanicalObject template="Vec3d" name="AnatomicalMesh_Mesh"  position="1.63636 0.636364 -0.545455 2.36364 0.636364 -0.545455 0.636364 1.63636 -0.545455 1.34783 1.34783 -0.347826 2.65217 1.34783 -0.347826 2 1 0 2 1 -0.75 2.33582 1.1791 -0.664179 2.30769 1.69231 -0.692308 3.36364 1.63636 -0.545455 0.636364 2.36364 -0.545455 1.69231 2.30769 -0.692308 1.1791 2.33582 -0.664179 1.34783 2.65217 -0.347826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"  velocity="0 0 0 0 0 0 0 0 0 0 0 0 0 0 0 0 0 0 0 0 0 0 0 0 0 0 0 0 0 0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"  force="0 0 0 0 0 0 0 0 0 0 0 0 0 0 0 0 0 0 0 0 0 0 0 0 0 0 0 0 0 0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"  externalForce="0 0 0 0 0 0 0 0 0 0 0 0 0 0 0 0 0 0 0 0 0 0 0 0 0 0 0 0 0 0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"  derivX="0 0 0 0 0 0 0 0 0 0 0 0 0 0 0 0 0 0 0 0 0 0 0 0 0 0 0 0 0 0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"  restScale="1" />
					<MeshTopology name="AnatomicalMesh_Topology"  position="@AnatomicalMesh_Mesh.position"  tetrahedra="769 0 770 771  771 772 773 770  769 770 772 771  771 770 773 0  0 1 774 775  775 773 776 774  0 774 773 775  775 774 776 1  1 777 778 779  779 776 780 778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" />
					<UniformMass template="Vec3d" name="AnatomicalMesh_Mass"  totalmass="100" />
					<IdentityMapping template="Vec3d,Vec3d" name="AnatomicalMesh_identityMapping"  input="@/BenderSimulation/Skeleton/BoneMesh/BoneMesh_BoneMesh"  output="@AnatomicalMesh_Mesh" />
					<TetrahedronFEMForceField template="Vec3d" name="AnatomicalMesh_femSolver"  method="large"  poissonRatio="0.3"  youngModulus="2e+06"  computeGlobalMatrix="0"  gatherPt=" "  gatherBsize=" " />
				</Node>
			</Node>
		</Node>
	</Node>
</Node>
