<?xml version="1.0"?>
<Node 	 name="root"  gravity="0 0 0"  dt="0.333333"  >
	<DefaultPipeline name="Collision Pipeline" />
	<BruteForceDetection name="Detection" />
	<LocalMinDistance name="Proximity"  alarmDistance="0.0001"  contactDistance="1e-06" />
	<DefaultContactManager name="Contact Manager"  response="default" />
	<DefaultCollisionGroupManager name="Collision Group Manager" />
	<EulerImplicitSolver name="root_TimeIntegrator"  rayleighStiffness="0.01"  rayleighMass="1" />
	<CGLinearSolver template="GraphScattered" name="root_CGSolver"  iterations="25"  tolerance="1e-05"  threshold="1e-05" />
	<Node 	 name="BenderSimulation"  gravity="0 0 0"  dt="0.333333"  time="0"  animate="0"  parents="@"  >
		<Node 	 name="Skeleton"  gravity="0 0 0"  dt="0.333333"  time="0"  animate="0"  parents="@/BenderSimulation"  >
			<MechanicalObject template="Vec3d" name="Skeleton_articulatedFrame"  position="2.09717 1.91819 3.03372 1.69201 -1.42202 6.52227 0.976796 -7.80189 6.64711"  velocity="0 0 0 0 0 0 0 0 0"  force="0 0 0 0 0 0 0 0 0"  externalForce="0 0 0 0 0 0 0 0 0"  derivX="0 0 0 0 0 0 0 0 0"  restScale="1" />
			<MeshTopology name="Skeleton_ArticulatedFrameTopology"  position="@Skeleton_articulatedFrame.position"  edges="0 1  1 2 " />
			<UniformMass template="Vec3d" name="Skeleton_FrameMass"  totalmass="1e+10" />
			<Node 	 name="AnatomicalMesh"  gravity="0 0 0"  dt="0.333333"  time="0"  animate="0"  parents="@/BenderSimulation/Skeleton"  >
				<MechanicalObject template="Vec3d" name="AnatomicalMesh_Mesh"  position="0.492064 0.468254 -0.539683 1.63636 0.636364 -0.545455 1 -2.44929e-16 0 1 -2.44929e-16 -0.666667 0.619048 -0.380952 -0.380952 1.5 -0.444444 -0.444444 2.36364 0.636364 -0.545455 2 -4.89859e-16 0 2 -4.89859e-16 -0.666667 2.5 -0.444444 -0.444444 3.52778 0.472222 -0.534722 3 -7.34788e-16 0 3 -7.34788e-16 -0.666667 3.38095 -0.380952 -0.380952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"  velocity="0 0 0 0 0 0 0 0 0 0 0 0 0 0 0 0 0 0 0 0 0 0 0 0 0 0 0 0 0 0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"  force="0 0 0 0 0 0 0 0 0 0 0 0 0 0 0 0 0 0 0 0 0 0 0 0 0 0 0 0 0 0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"  externalForce="0 0 0 0 0 0 0 0 0 0 0 0 0 0 0 0 0 0 0 0 0 0 0 0 0 0 0 0 0 0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"  derivX="0 0 0 0 0 0 0 0 0 0 0 0 0 0 0 0 0 0 0 0 0 0 0 0 0 0 0 0 0 0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"  restScale="1" />
				<MeshTopology name="AnatomicalMesh_Topology"  position="@AnatomicalMesh_Mesh.position"  tetrahedra="0 1 2 3  3 4 5 2  0 2 4 3  3 2 5 1  1 6 7 8  8 5 9 7  1 7 5 8  8 7 9 6  6 10 11 12  12 9 13 11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" />
				<UniformMass template="Vec3d" name="AnatomicalMesh_Mass"  totalmass="100" />
				<TetrahedronFEMForceField template="Vec3d" name="AnatomicalMesh_femSolver"  method="large"  poissonRatio="0.3"  youngModulus="200 200 200 200 200 200 200 200 200 200 200 200 200 200 200 200 200 200 200 200 2e+06 2e+06 2e+06 2e+06 2e+06 2e+06 2e+06 200 200 200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"  computeGlobalMatrix="0"  gatherPt=" "  gatherBsize=" " />
				<Node 	 name="collisionNode"  gravity="0 0 0"  dt="0.333333"  time="0"  animate="0"  parents="@/BenderSimulation/Skeleton/AnatomicalMesh"  >
					<MechanicalObject template="Vec3d" name="collisionNode_SurfaceMesh0"  position="1 -0 -0.9 2 -0 -0.9 2 -0.9 1 4 0.0999999 1 4 0.0999999 3 4.9 2 1 4.9 2 3 3.9 4 1 3.9 4 3 2 4.9 3 0.0999999 4 3 0.0999999 4 5 -0.9 2 5 0.0999999 -0 5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"  velocity="0 0 0 0 0 0 0 0 0 0 0 0 0 0 0 0 0 0 0 0 0 0 0 0 0 0 0 0 0 0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"  force="0 0 0 0 0 0 0 0 0 0 0 0 0 0 0 0 0 0 0 0 0 0 0 0 0 0 0 0 0 0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"  externalForce="0 0 0 0 0 0 0 0 0 0 0 0 0 0 0 0 0 0 0 0 0 0 0 0 0 0 0 0 0 0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"  derivX="0 0 0 0 0 0 0 0 0 0 0 0 0 0 0 0 0 0 0 0 0 0 0 0 0 0 0 0 0 0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"  restScale="1" />
					<MeshTopology name="collisionNode_SurfaceTopology"  position="@collisionNode_SurfaceMesh0.position"  triangles="0 1 2  2 1 3  4 3 5  4 5 6  6 5 7  6 7 8  11 10 12  12 13 14  14 15 16  16 15 17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" />
					<BarycentricMapping template="Vec3d,Vec3d" name="collisionNode_collisionMapping"  input="@/BenderSimulation/Skeleton/AnatomicalMesh/AnatomicalMesh_Mesh"  output="@collisionNode_SurfaceMesh0" />
					<TTriangleModel template="Vec3d" name="collisionNode_TriangleCollision"  selfCollision="1"  proximity="0.3"  contactStiffness="40"  contactFriction="0"  contactRestitution="0.1"  bothSide="1" />
					<TPointModel template="Vec3d" name="collisionNode_PointCollision"  selfCollision="1"  proximity="0.3"  contactStiffness="40"  contactFriction="0"  contactRestitution="0.1"  bothSide="1" />
				</Node>
				<StiffSpringForceField template="Vec3d" name="Spring-Contact"  showArrowSize="1"  drawMode="2"  spring="0 419 10000 0 1
 1 1025 10000 0 1
 2 1833 10000 0 1
"  object1="@/BenderSimulation/Skeleton/Skeleton_articulatedFrame"  object2="@AnatomicalMesh_Mesh" />
			</Node>
		</Node>
	</Node>
</Node>
